units metal
boundary p p p
atom_style atomic
timestep 0.001
pair_style hybrid/overlay eam/fs zero 5.0
read_data structure.data
pair_coeff * * eam/fs examples/potentials/ZrCu.eam.fs Cu Zr Zr
pair_coeff * * zero
mass * 63.546
variable mvol equal vol
variable mlx equal lx
variable mly equal ly
variable mlz equal lz
variable mpress equal press
variable mpe equal pe/atoms
variable metotal equal etotal/atoms
variable mtemp equal temp
velocity all create 800.000000 7271
fix b1a all nve
fix b1b all temp/berendsen 800.000000 800.000000 100.000000
fix b1c all press/berendsen iso 0.000000 0.000000 100.000000
thermo_style custom step pe press vol etotal temp lx ly lz
thermo 10
run 1000
unfix b1a
unfix b1b
unfix b1c
fix b1a all nve
fix b1b all temp/berendsen 800.000000 800.000000 100.000000
fix b1c all press/berendsen iso 0.000000 0.000000 100.000000
fix 2 all ave/time 10 10 100 v_mlx v_mly v_mlz v_mpress v_mpe v_metotal v_mtemp title2 "# TimeStep lx[A] ly[A] lz[A] press[bar] pe[eV/atom] etotal[eV/atom] temp[K]" file avg.dat
run 1000
unfix b1a
unfix b1b
unfix b1c
unfix 2
dump 2 all custom 1 traj.equilibration_stage2.dat id type mass x y z vx vy vz
run 0
undump 2
write_data conf.equilibration.data
