units metal
boundary p p p
atom_style atomic
timestep 0.001
variable li equal 1.0
variable lf equal 0.0
pair_style hybrid/overlay eam/fs zero 5.0
read_data conf.equilibration.data
pair_coeff * * eam/fs examples/potentials/ZrCu.eam.fs Cu Zr Zr
pair_coeff * * zero
mass * 63.546
group g1 type 1
group g2 type 2
run 0
change_box all x final 0.0 18.075000 y final 0.0 18.075000 z final 0.0 18.075000 remap units box
velocity all create 800.000000 7271 mom yes rot yes dist gaussian
fix f1 all npt temp 800.000000 800.000000 0.100000 iso 0.000000 0.000000 0.100000
thermo_style custom step pe
thermo 1000
run 2500
variable flambda equal ramp(${li},${lf})
variable blambda equal ramp(${lf},${li})
pair_style hybrid/scaled v_flambda eam/fs v_flambda zero 5.0 v_blambda eam/fs v_blambda zero 5.0
pair_coeff * * eam/fs 1 examples/potentials/ZrCu.eam.fs Cu Zr Zr
pair_coeff * * zero 1
pair_coeff * * eam/fs 2 examples/potentials/ZrCu.eam.fs Cu Cu Zr
pair_coeff * * zero 2
compute c1_1 all pair eam/fs 1
compute c1_2 all pair zero 1
compute c2_1 all pair eam/fs 2
compute c2_2 all pair zero 2
variable step equal step
variable dU1 equal (c_c1_1+c_c1_2)/atoms
variable dU2 equal (c_c2_1+c_c2_2)/atoms
thermo_style custom step v_dU1 v_dU2
thermo 1000
fix f2 all print 1 "${dU1} ${dU2} ${flambda}" title "# dU_1[eV/atom] dU_2[eV/atom] lambda" screen no file forward_1.dat
run 5000
unfix f2
uncompute c1_1
uncompute c1_2
uncompute c2_1
uncompute c2_2
pair_style hybrid/overlay eam/fs zero 5.0
pair_coeff * * eam/fs examples/potentials/ZrCu.eam.fs Cu Cu Zr
pair_coeff * * zero
thermo_style custom step pe
thermo 1000
run 2500
variable flambda equal ramp(${lf},${li})
variable blambda equal ramp(${li},${lf})
pair_style hybrid/scaled v_flambda eam/fs v_flambda zero 5.0 v_blambda eam/fs v_blambda zero 5.0
pair_coeff * * eam/fs 1 examples/potentials/ZrCu.eam.fs Cu Zr Zr
pair_coeff * * zero 1
pair_coeff * * eam/fs 2 examples/potentials/ZrCu.eam.fs Cu Cu Zr
pair_coeff * * zero 2
compute c1_1 all pair eam/fs 1
compute c1_2 all pair zero 1
compute c2_1 all pair eam/fs 2
compute c2_2 all pair zero 2
variable step equal step
variable dU1 equal (c_c1_1+c_c1_2)/atoms
variable dU2 equal (c_c2_1+c_c2_2)/atoms
thermo_style custom step v_dU1 v_dU2
thermo 1000
fix f2 all print 1 "${dU1} ${dU2} ${flambda}" title "# dU_1[eV/atom] dU_2[eV/atom] lambda" screen no file backward_1.dat
run 5000
unfix f2
uncompute c1_1
uncompute c1_2
uncompute c2_1
uncompute c2_2
